# OpenSim document version 40000
InverseKinematicsTool:
  model_file: Pusher.osim
  accuracy: 1e-5
  time_range: 0 11.98
  output_motion_file: trajectory.mot
  marker_file: trajectory.trc
  report_marker_locations: false
  IKTaskSet push_IK:
    IKMarkerTask mbladej: weight=1
    IKMarkerTask mend: weight=1
    IKCoordinateTask bJoint_3: weight=100000 value_type=default_value value=0
    IKCoordinateTask bJoint_4: weight=100000 value_type=default_value value=0
